A := [2, 4, 7, 5, 2; 3, 6, 2, 7, 3; 7, 9, 6, 5, 8; 3, 6, 4, 2, 5; 5, 3, 7, 6, 2]
f(x) := sum(sum(A[i, j]*x[i, j], j = 0 .. 4), i = 0 .. 4)
x[4, 4] := 0
Given
sum(x[i, 0], i = 0 .. 4) == 1
sum(x[i, 1], i = 0 .. 4) == 1
sum(x[i, 2], i = 0 .. 4) == 1
sum(x[i, 3], i = 0 .. 4) == 1
sum(x[i, 4], i = 0 .. 4) == 1
sum(x[0, j], j = 0 .. 4) == 1
sum(x[1, j], j = 0 .. 4) == 1
sum(x[2, j], j = 0 .. 4) == 1
sum(x[3, j], j = 0 .. 4) == 1
sum(x[4, j], j = 0 .. 4) == 1
x ≥ 0
x ≤ 1
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V := Minimize(f, x) = [0, 0, 0, 0, 1; 0, 0, 1, 0, 0; 0, 0, 0, 1, 0; 1, 0, 0, 0, 0; 0, 1, 0, 0, 0]
f(V) = 15
w := Maximize(f, x)  # error: Эта переменная не определена.
