f(x1, x2) := 14*x1 + 10*x2
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7*x1 + 8*x2 ≤ 476
6*x1 + 3*x2 ≤ 364
5*x1 + x2 ≤ 320
ORIGIN := 1
n := 2
c := [14; 10]
a := [7, 8; 6, 3; 5, 1]
b := [476; 364; 320]
f(x) := sum(c[j]*x[j], j = 1 .. n)
x[n] := 0
Given
a*x ≤ b
x ≥ 0
x := Maximize(f, x)
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x = [54.963; 11.4074]
f(x) = 883.556
