# Лаборатория 9:
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a := transpose([4, 5, 7])
c := [5, 4, 5; 6, 5, 4; 4, 7, 5]
b := transpose([6, 8, 2])
# Проверка на разрешимость
sum(a) = 16
sum(b) = 16  # => Задача разрешима
# Целевая функция:
f(x) := sum(sum(c[i, j]*x[i, j], j = 0 .. 2), i = 0 .. 2)
# Опорный план:
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x := [4, 0, 0; 2, 3, 0; 0, 5, 2]
i := 0 .. 2
j := 0 .. 2
e[i, j] := 1
Ограничения
Given
(x*e)[:, 0] == a
transpose(e*x)[:, 0] == b
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x ≥ 0
g := Minimize(f, x)
g = [0, 4, 0; 0, 4, 1; 6, 0, 1]
sum := 4*4 + 5*4 + 4*1 + 5*1 + 4*6
sum = 69
