# Лабараторная №1
# Прокопьев 932201
# [area: Задание 1]
tan(π/4 + 1) - cos(π/8) = -5.51192
sqrt(1 + ln(1 + sin(π/4))) - 1 = 0.23887
# [area: Задание 2.1        (f(x),x0,k0)]
f(x) := 2*sqrt(x^2 + 2*x - 2.75) - x - 3
f(3) = 1
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x0 := 2
k0 := root(f(x0), x0)
k0 = 2.27008
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# [area: Задание 2.2        (f1(x),x10,k10)]
f1(x) := sqrt(3*x + 1) + sqrt(9 - x) - 6/sqrt(9 - x)
f1(3) = 3.16228
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x10 := 7
k10 := root(f1(x10), x10)
k10 = 8
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# [area: Задание 2.3        (f2(x),x20,k20)]
f2(x) := e^(-x^2) + e^(2*x) - 4
f2(0) = -2
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x20 := 0
k20 := root(f2(x20), x20)
k20 = 0.596923
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# [area: Задание 2.4        (f3(x),x30,k30)]
f3(x) := log(log(x)) + log(log(x^3) - 2)
f3(10) = 0
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x30 := 10
k30 := root(f3(x30), x30)
k30 = 10
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# [area: Задание 2.5        (f4(x),x40,k40)]
f4(x) := nthroot((x + 1)/(x - 1), 3) + nthroot(2*x/(x^2 + 1), 3) - 1
f4(0) = -2
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x40 := -1
k40 := root(f4(x40), x40)
k40 = -1.04152e20
# не пересекает Ох
f4(k40) = -2.67786e-7
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# [area: Задание 3.1]
P(x) := 0.2*x^5 - 4*x^3 + 12*x^2 - 9
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V1 := P(x) coeffs → [-9; 0; 12; -4; 0; 0.2]
O1 := polyroots(V1) = [-5.53023; -0.774468; 1.061; 2.62185 - 1.74027i; 2.62185 + 1.74027i]
# [area: Задание 3.2]
P2(x) := -6*x^4 + 18*x^2 - 3*x + 6
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V2 := P2(x) coeffs → [6; -3; 18; 0; -6]
O2 := polyroots(V2) = [-1.88345; 0.0696491 - 0.547323i; 0.0696491 + 0.547323i; 1.74415]
# [area: Задание 4.1]
x := 2
y := 1
Given
y^2 - x - 3*log(x) == 0
5*x + x*y - 2*x^2 == 1
Find(x, y) = [3.48744; 2.26163]
# [area: Задание 4.2]
Given
sqrt(2*x - y + 11) - sqrt(3*x + y - 9) == 3
nthroot(2*x - y + 11, 4) + nthroot(3*x + y - 9, 4) == 3
Find(x, y) = [3; 1]
