# Лабараторная №1
# Прокопьев 932201
# [area: Задание 1]
tan(π/4 + 1) - cos(π/8) = -5.51192
sqrt(1 + ln(1 + sin(π/4))) - 1 = 0.23887
# [area: Задание 2.1        (f(x),x0,k0)]
f(x) := 2*sqrt(x^2 + 2*x - 2.75) - x - 3
f(3) = 1
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x0 := 2
k0 := root(f(x0), x0)
k0 = 2.27008
# [area: Задание 2.2        (f1(x),x10,k10)]
f1(x) := sqrt(3*x + 1) + sqrt(9 - x) - 6/sqrt(9 - x)
f1(3) = 3.16228
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x10 := 7
k10 := root(f1(x10), x10)
k10 = 8
# [area: Задание 2.3        (f2(x),x20,k20)]
f2(x) := e^(-x^2) + e^(2*x) - 4
f2(0) = -2
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x20 := 0
k20 := root(f2(x20), x20)
k20 = 0.596923
# [area: Задание 2.4        (f3(x),x30,k30)]
f3(x) := log(log(x)) + log(log(x^3) - 2)
f3(100) = 0.90309
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x30 := 1000
# нет корней
# т.к. сумма логарифмов, каждый больше 0 за счет ОДЗ
k30 := root(f3(x30), x30)  # error: Это вычисление не приближается к решению.
k30 =  # error: Эта переменная не определена.
# [area: Задание 2.5        (f4(x),x40,k40)]
f4(x) := nthroot((x + 1)/(x - 1), 3) + nthroot(2*x/(x^2 + 1), 3) - 1
f4(0) = -2
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x40 := 100
k40 := root(f4(x40), x40)
# верт ассимптота х=1
# гор ассимптота у=,,,
k40 = 1.27664e23
# [area: Задание 3.1]
P(x) := 0.2*x^5 - 4*x^3 + 12*x^2 - 9
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V1 := P(x) coeffs → [-9; 0; 12; -4; 0; 0.2]
O1 := polyroots(V1)
O1 = [-5.53023; -0.774468; 1.061; 2.62185 - 1.74027i; 2.62185 + 1.74027i]
# [area: Задание 3.2]
P2(x) := -6*(x^4) + 18*x^2 - 3*x + 6
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V2 := P2(x) coeffs → [6; -3; 18; 0; -6]
O2 := polyroots(V2)
O2 = [-1.88345; 0.0696491 - 0.547323i; 0.0696491 + 0.547323i; 1.74415]
