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# Прокопьев Даниил 932201
# [area: Задание 1.1]
f(xi) := -e^(xi^2/3) - xi/2
p(xi) := d/dxi(f(xi))
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xi := -1
extreme := root(p(xi), xi)
extreme = -0.651151
p2(xi) := d/dxi(p(xi))
p2(extreme) = -0.984922  # Вторая производная
# [area: Задание 1,2]
f1(x2) := 0.5*x2^5 - 2*x2^4 + 3*x2^3 - 7*x2 + 8
p1(x2) := d/dx2(f1(x2))
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x2i := 2
x2 := -2
extreme1i := root(p1(x2i), x2i)
extreme1 := root(p1(x2), x2)
extreme1i = 1.63959  # Вторая производная
extreme1 = -0.671931  # Вторая производная
p3i(x2i) := d/dx2i(p(x2i))
p3i(extreme1i) = -4.56053
p3(x2) := d/dx2(p1(x2))
p3(extreme1) = -25.9643
# [area: Задание 1.3]
f3(x4) := x4^3*e^(-x4^2)/3
p4(x4) := d/dx4(f3(x4))
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f(xt) := xt^4
d/dxt(f(xt)) → 4*xt^3
x4 := -1
x4i := 0
x4r := 1
extreme2 := root(p4(x4), x4)
extreme2i := root(p4(x4i), x4i)
extreme2r := root(p4(x4r), x4r)
extreme2 = -1.22474  # Вторая производная
extreme2i = 3.36576e-18  # Вторая производная
extreme2r = 1.22474  # Вторая производная
p5(x4) := d/dx4(p4(x4))
p5i(x4i) := d/dx4i(p4(x4i))
p5i(extreme2i) = 2.2117e-17
p5r(x4r) := d/dx4r(p4(x4r))
p5(extreme2) = 0.546555
p5r(extreme2r) = -0.546555
# [area: Задание 1,4]
f10(x10) := nthroot((x10^2/(1 + x10^4)), 3)
p10(x10) := d/dx10(f10(x10))
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x10 := -1
x10i := 0
x10r := 1
extreme4 := root(p10(x10), x10)
extreme4i := root(p10(x10i), x10i)
extreme4r := root(p10(x10r), x10r)
extreme4 = -1
extreme4i = 0
extreme4r = 1
p11(x10) := d/dx10(p10(x10))  # Вторая производная
# Вторая производная
# Вторая производная
p11i(x10i) := d/dx10i(p10(x10i))
p11r(x10r) := d/dx10r(p10(x10r))
p11(extreme4) = -1.05827
p11i(extreme4i) = -4.69054e-15
p11r(extreme4r) = -1.05827
# [area: Задание 2.1]
y(x34) := x34/(x34 - 1)
x34/(x34 - 1) series, 3, x34 == 2 → 4 - x34 + (x34 - 2)^2
f20(x34) := 4 - x34 + (x34 - 2)^2
fg1(x34) := d/dx34(f20(x34))
fg2(x34) := d^2/dx34^2(f20(x34))
fg3(x34) := d^3/dx34^3(f20(x34))
k(x34) := f20(2) + fg1(2)/1!*(x34 - 2) + fg2(2)/2!*(x34 - 2)^2
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# [area: Задание 2.2]
y1(x35) := asin(x35)
asin(x35) series, 3, x35 == 0 → x35 + x35^3/6
f21(x35) := x35 + x35^3/6
fg12(x35) := d/dx35(f21(x35))
fg15(x35) := d^2/dx35^2(f21(x35))
fg13(x35) := d^3/dx35^3(f21(x35))
k1(x35) := f21(0) + fg12(0)/1!*(x35 - 0) + fg15(0)/2!*(x35 - 0)^2 + fg13(0)/3!*(x35 - 0)^3
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# [area: Задание 2.3]
y2(x36) := 1/sqrt(x36)
1/sqrt(x36) series, 3, x36 == 1 → 3/2 - x36/2 + 3*(x36 - 1)^2/8
f22(x36) := 3/2 - x36/2 + 3*(x36 - 1)^2/8
fgu(x36) := d/dx36(f22(x36))
fgu2(x36) := d^2/dx36^2(f22(x36))
fgu3(x36) := d^3/dx36^3(f22(x36))
k3(x36) := f22(1) + fgu2(1)/1!*(x36 - 1) + fgu2(1)/2!*(x36 - 1)^2
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