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# Прокопеьв Даниил 932201
# [area: Задание 1.1]
A2 := [1, 1, 0; 2, -2, 3; 4, 1, 3]
B := [1, 0, 0; 0, 1, 0; 0, 0, 1]
C2 := [-1, 3, 2; 1, 0, 4; 5, 7, 1]
D := A2 + (B + C2)^-1*C2
D = [2.44828, 0.862069, -0.172414; 1.68966, -0.827586, 2.96552; 3.96552, 0.741379, 4.05172]
# [area: Задание 1.2]
A3 := [2, -2, 1; -1, -1, 7; 1, -4, 2]
B3 := [4; 16; -3]
Given
C3 := lsolve(A3, B3)
C3 = [3.66667; 3.30769; 3.28205]
