f(x, y) := 2*x^2 + y^2 - 2*x*y + 3*x + y
f(x, y) := 2*x^2 + y^2 - 2*x*y + 3*x + y
gy(x, y) := d/dy(f(x, y)) → 2*y - 2*x + 1
N := 50
ax := -10
b := 0.2
gx(x, y) := d/dx(f(x, y)) → 4*x - 2*y + 3
i := 0 .. N
j := 0 .. N
ay := -2.25
x[i] := ax + b*i
y[j] := ay + b*j
M[i, j] := f(x[i], y[j])
# [component: inputs M]
# [component: inputs M]
